a := 10.5
b := 0.77
c := 1.28
d := 2.45
sqrt(53/a) = 2.24669
AAA1 := 53/a
AAA1 = 5.04762
AAA2 := sqrt(AAA1)
AAA2 = 2.24669
AAA3 := AAA2 + d
AAA3 = 4.69669
AAA4 := 4*b
AAA4 = 3.08
AAA5 := AAA3 - AAA4
AAA5 = 1.61669
BBB1 := b*c
BBB1 = 0.9856
BBB2 := 1 + BBB1
BBB2 = 1.9856
CCC1 := AAA5/BBB2
CCC1 = 0.814208
1/CCC1 = 1.22819
